// COMSOL Multiphysics 5.1.0.234 model "FEM_Project.mph"
// Outline of the model tree

Parameters
  he = 0.05  // Quadratic Element Size

Geometry
  geom1 "1D Geometry" (1D, length unit m)
    i1: Interval "1D Interval" | p = 0, 1
    fin: Finalize "Form Union"

Physics
  cdeq: ConvectionDiffusionEquation "Convection-Diffusion PDE" on all domains
    dependent variable C
    ShapeProperty.valueType = real
    Units.DependentVariableQuantity = concentration
    cdeq1: ConvectionDiffusionEquation "Convection-Diffusion PDE" (default) | f = 0; c = 2; be = 10; da = 0
    zflx1: ZeroFluxBoundary "Zero Flux (Overridden)" (default)
    init1: init "Initial Values (Overridden)" (default)
    dir2: DirichletBoundary "Dirichlet BC (x = 0)" on boundaries 1 | r = 0
    dir1: DirichletBoundary "Dirichlet BC (x = L)" on boundaries 2 | r = 1

Mesh
  mesh1 "1D Quadratic Mesh"
    size: MeshSizeDefault "Mesh Size" | hmax = he; hgrad = 1; hauto = 5
    edg1: Edge on remaining entities

Studies
  std1 "Stationary Study"
    stat: Stationary

Solver configurations
  sol1 "Solution 1" (study std1)
    v1: Variables "Dependent Variables 1"
    s1: Stationary "Stationary Solver 1"
      dDef: Direct
      fc1: FullyCoupled | linsolver = dDef

Datasets
  dset1: Solution | solution = sol1

Plots
  pg1: PlotGroup1D "1D Plots" | data = dset1
    lngr1: LineGraph on all domains | expr = C; xdata = expr; xdataexpr = x

Exports
  data1: Data
    data = dset1
    expr = C
    unit = mol/m^3
    descr = Dependent variable C
    filename = C:\Users\Administrator\Desktop\Untitled.txt
    transpose = off